[
    cos(3*π/2 + fi), 0, -sin(3*π/2 + fi), 0;
    0, 1, 0, 0;
    sin(3*π/2 + fi), 0, cos(3*π/2 + fi), 0;
    0, 0, 0, 1
]*[1, 0, 0, N; 0, 1, 0, A; 0, 0, 1, M; 0, 0, 0, 1]*[X; Y; Z; 1] simplify → [
    M*cos(fi) + Z*cos(fi) + N*sin(fi) + X*sin(fi);
    A + Y;
    M*sin(fi) - X*cos(fi) - N*cos(fi) + Z*sin(fi);
    1
]
[X_д; Y_д; Z_д; 1] == [cos(π/2 - fi), 0, sin(π/2 - fi), 0; 0, 1, 0, 0; -sin(π/2 - fi), 0, cos(π/2 - fi), 0; 0, 0, 0, 1]*[1, 0, 0, N; 0, 1, 0, A; 0, 0, 1, M; 0, 0, 0, 1]*[X; Y; Z; 1] simplify → [X_д; Y_д; Z_д; 1] == [
    M*cos(fi) + Z*cos(fi) + N*sin(fi) + X*sin(fi);
    A + Y;
    M*sin(fi) - X*cos(fi) - N*cos(fi) + Z*sin(fi);
    1
]
[X_2; Y_2; Z_2; 1] == [cos(dfi), sin(dfi), 0, 0; -sin(dfi), cos(dfi), 0, 0; 0, 0, 1, 0; 0, 0, 0, 1]*[1, 0, 0, 0; 0, 1, 0, 0; 0, 0, 1, -dz; 0, 0, 0, 1]*[X_д; Y_д; Z_д; 1] → [X_2; Y_2; Z_2; 1] == [X_д*cos(dfi) + Y_д*sin(dfi); Y_д*cos(dfi) - X_д*sin(dfi); Z_д - dz; 1]
dz == R_k*dfi/tan(w)
dfi == dz*tan(w)/R_k
[X; Y; Z; 1] == [R*cos(psi); -R*sin(psi); C_i; 1]
[X_ш; Y_ш; Z_ш; 1] == [cos(dfi), sin(dfi), 0, 0; -sin(dfi), cos(dfi), 0, 0; 0, 0, 1, 0; 0, 0, 0, 1]*[1, 0, 0, 0; 0, 1, 0, dK; 0, 0, 1, 0; 0, 0, 0, 1]*[cos(eps), 0, sin(eps), 0; 0, 1, 0, 0; -sin(eps), 0, cos(eps), 0; 0, 0, 0, 1]*[1, 0, 0, 0; 0, 1, 0, A; 0, 0, 1, 0; 0, 0, 0, 1]*[R*cos(psi); -R*sin(psi); C_i; 1] simplify → [X_ш; Y_ш; Z_ш; 1] == [
    A*sin(dfi) + dK*sin(dfi) + C_i*cos(dfi)*sin(eps) - R*sin(dfi)*sin(psi) + R*cos(dfi)*cos(eps)*cos(psi);
    A*cos(dfi) + dK*cos(dfi) - R*cos(dfi)*sin(psi) - C_i*sin(dfi)*sin(eps) - R*cos(eps)*cos(psi)*sin(dfi);
    C_i*cos(eps) - R*cos(psi)*sin(eps);
    1
]  # disabled
[X_ш; Y_ш; Z_ш; 1] == [1, 0, 0, 0; 0, cos(delta), sin(delta), 0; 0, -sin(delta), cos(delta), 0; 0, 0, 0, 1]*[cos(eps), 0, sin(eps), 0; 0, 1, 0, 0; -sin(eps), 0, cos(eps), 0; 0, 0, 0, 1]*[1, 0, 0, 0; 0, 1, 0, A; 0, 0, 1, 0; 0, 0, 0, 1]*[cos(dfi), sin(dfi), 0, 0; -sin(dfi), cos(dfi), 0, 0; 0, 0, 1, 0; 0, 0, 0, 1]*[1, 0, 0, 0; 0, 1, 0, dK; 0, 0, 1, 0; 0, 0, 0, 1]*[R*cos(psi); -R*sin(psi); C_i; 1] simplify → [X_ш; Y_ш; Z_ш; 1] == [
    C_i*sin(eps) + dK*cos(eps)*sin(dfi) + R*cos(dfi)*cos(eps)*cos(psi) - R*cos(eps)*sin(dfi)*sin(psi);
    dK*(cos(dfi)*cos(delta) - sin(dfi)*sin(eps)*sin(delta)) + A*cos(delta) + C_i*cos(eps)*sin(delta) - R*cos(psi)*(cos(delta)*sin(dfi) + cos(dfi)*sin(eps)*sin(delta)) - R*sin(psi)*(cos(dfi)*cos(delta) - sin(dfi)*sin(eps)*sin(delta));
    C_i*cos(eps)*cos(delta) - A*sin(delta) - dK*(cos(dfi)*sin(delta) + cos(delta)*sin(dfi)*sin(eps)) + R*cos(psi)*(sin(dfi)*sin(delta) - cos(dfi)*cos(delta)*sin(eps)) + R*sin(psi)*(cos(dfi)*sin(delta) + cos(delta)*sin(dfi)*sin(eps));
    1
]  # disabled
M_θ(θ) := [cos(θ), sin(θ), 0, 0; -sin(θ), cos(θ), 0, 0; 0, 0, 1, A_z; 0, 0, 0, 1]  # error: Эта переменная не определена. Проверьте правильность установки обозначения.
[
    cos(π/2 - π/z), sin(π/2 - π/z), 0, 0;
    -sin(π/2 - π/z), cos(π/2 - π/z), 0, 0;
    0, 0, 1, 0;
    0, 0, 0, 1
]
M_δ := [cos(δ), 0, -sin(δ), -A_x*cos(δ); 0, 1, 0, 0; sin(δ), 0, cos(δ), -A_x*sin(δ); 0, 0, 0, 1]  # error: Эта переменная не определена. Проверьте правильность установки обозначения.
M_ε := [1, 0, 0, 0; 0, cos(ε), -sin(ε), 0; 0, sin(ε), cos(ε), 0; 0, 0, 0, 1]  # error: Значение должно быть скаляром или вектором.
[X_Ш; Y_Ш; Z_Ш; 1] == (([1, 0, 0, 0; 0, cos(eps), -sin(eps), 0; 0, sin(eps), cos(eps), 0; 0, 0, 0, 1]*[
    cos(delta), 0, -sin(delta), -A_x*cos(delta);
    0, 1, 0, 0;
    sin(delta), 0, cos(delta), -A_x*sin(delta);
    0, 0, 0, 1
])*[cos(θ), sin(θ), 0, 0; -sin(θ), cos(θ), 0, 0; 0, 0, 1, A_z; 0, 0, 0, 1])*[X; Y; Z; 1] simplify → [X_Ш; Y_Ш; Z_Ш; 1] == [
    X*cos(θ)*cos(delta) - A_z*sin(delta) - Z*sin(delta) - A_x*cos(delta) + Y*cos(delta)*sin(θ);
    Y*(cos(θ)*cos(eps) - sin(θ)*sin(eps)*sin(delta)) - X*(cos(eps)*sin(θ) + cos(θ)*sin(eps)*sin(delta)) - A_z*cos(delta)*sin(eps) - Z*cos(delta)*sin(eps) + A_x*sin(eps)*sin(delta);
    Y*(cos(θ)*sin(eps) + cos(eps)*sin(θ)*sin(delta)) - X*(sin(θ)*sin(eps) - cos(θ)*cos(eps)*sin(delta)) + A_z*cos(eps)*cos(delta) + Z*cos(eps)*cos(delta) - A_x*cos(eps)*sin(delta);
    1
]
[X_д; Y_д; Z_д; 1] == [1, 0, 0, dx; 0, 1, 0, dy; 0, 0, 1, dz; 0, 0, 0, 1]*(([cos(θ), -sin(θ), 0, 0; sin(θ), cos(θ), 0, 0; 0, 0, 1, 0; 0, 0, 0, 1]*[cos(delta), 0, sin(delta), (A_x - dK); 0, 1, 0, 0; -sin(delta), 0, cos(delta), 0; 0, 0, 0, 1])*[1, 0, 0, 0; 0, cos(eps), sin(eps), 0; 0, -sin(eps), cos(eps), 0; 0, 0, 0, 1])*[R*cos(psi); -R*sin(psi); C_i; 1] simplify → [X_д; Y_д; Z_д; 1] == [
    dx - C_i*(sin(θ)*sin(eps) - cos(θ)*cos(eps)*sin(delta)) + cos(θ)*(A_x - dK) + R*sin(psi)*(cos(eps)*sin(θ) + cos(θ)*sin(eps)*sin(delta)) + R*cos(θ)*cos(psi)*cos(delta);
    dy + C_i*(cos(θ)*sin(eps) + cos(eps)*sin(θ)*sin(delta)) + sin(θ)*(A_x - dK) - R*sin(psi)*(cos(θ)*cos(eps) - sin(θ)*sin(eps)*sin(delta)) + R*cos(psi)*cos(delta)*sin(θ);
    dz + C_i*cos(eps)*cos(delta) - R*cos(psi)*sin(delta) + R*cos(delta)*sin(eps)*sin(psi);
    1
]
r_1 := 0
r_2 := 0
α_1 := 30 deg
α_2 := 30 deg
C_max := 6
r_o := 0.5
b := 1
Rmax := 75
R0 := Rmax - (C_max - b)/2/tan(α_1) = 70.6699  # Для круга с перемычкой
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# Для круга с радиусом
R1(l) :=
    if 0 ≤ l < (C_max - b)/2
        R0 + l/tan(α_1)
    else if (C_max - b)/2 ≤ l < (C_max + b)/2
        Rmax
    else if C_max ≥ l ≥ (C_max + b)/2
        Rmax - (l - (C_max + b)/2)/tan(α_1)
    else
        0
R12(l) :=
    if 0 ≤ l < (C_max - b)/2 - r_1*cos(α_1)
        Rmax - (C_max - b - 2*r_1*cos(α_1))/(2*tan(α_1)) - r_1*(1 - sin(α_1)) + l/tan(α_1)
    else if (C_max - b)/2 - r_1*cos(α_1) ≤ l < (C_max - b)/2
        sqrt(r_1^2 - ((C_max - b)/2 - l)^2) + Rmax - r_1
    else if (C_max - b)/2 ≤ l < (C_max + b)/2
        Rmax
    else if (C_max + b)/2 ≤ l < (C_max + b)/2 + r_2*cos(α_2)
        sqrt(r_2^2 - ((C_max + b)/2 - l)^2) + Rmax - r_2
    else if (C_max + b)/2 + r_2*cos(α_2) ≤ l ≤ C_max
        Rmax - r_2*(1 - sin(α_2)) - (2*l - (C_max + b + 2*r_2*cos(α_2)))/(2*tan(α_2))
    else
        0
Rr(l) :=
    if 0 ≤ l < (C_max - 2*r_o*cos(α_1))/2
        Rmax - (C_max - 2*r_o*cos(α_1))/2/tan(α_1) - r_o*(1 - sin(α_1)) + l/tan(α_1)
    else if (C_max - 2*r_o*cos(α_1))/2 ≤ l < (C_max + 2*r_o*cos(α_1))/2
        sqrt(r_o^2 - (C_max/2 - l)^2) + Rmax - r_o
    else if C_max ≥ l ≥ (C_max + 2*r_o*cos(α_1))/2
        Rmax - r_o*(1 - sin(α_1)) - (l - (C_max + 2*r_o*cos(α_1))/2)/tan(α_1)
    else
        0
# Для круга с перемычкой
XYZ(C_i, delta, θ, A_x, dK, eps, psi) := (([cos(θ), -sin(θ), 0, 0; sin(θ), cos(θ), 0, 0; 0, 0, 1, 0; 0, 0, 0, 1]*[
    cos(delta), 0, sin(delta), (A_x - dK) - Rmax*(1 - cos(delta)) - C_max/2*sin(delta);
    0, 1, 0, 0;
    -sin(delta), 0, cos(delta), -Rmax*sin(delta) + C_max/2*(1 - cos(delta));
    0, 0, 0, 1
])*[1, 0, 0, 0; 0, cos(eps), sin(eps), 0; 0, -sin(eps), cos(eps), 0; 0, 0, 0, 1])*[cos(psi), sin(psi), 0, 0; -sin(psi), cos(psi), 0, 0; 0, 0, 1, 0; 0, 0, 0, 1]*[R12(C_i); 0; C_i; 1]
# Для круга с радиусом
XYZ(C_i, delta, θ, A_x, dK, eps, psi) := (([cos(θ), -sin(θ), 0, 0; sin(θ), cos(θ), 0, 0; 0, 0, 1, 0; 0, 0, 0, 1]*[
    cos(delta), 0, sin(delta), (A_x - dK) - Rmax*(1 - cos(delta)) - C_max/2*sin(delta);
    0, 1, 0, 0;
    -sin(delta), 0, cos(delta), -Rmax*sin(delta) + C_max/2*(1 - cos(delta));
    0, 0, 0, 1
])*[1, 0, 0, 0; 0, cos(eps), sin(eps), 0; 0, -sin(eps), cos(eps), 0; 0, 0, 0, 1])*[cos(psi), sin(psi), 0, 0; -sin(psi), cos(psi), 0, 0; 0, 0, 1, 0; 0, 0, 0, 1]*[Rr(C_i); 0; C_i; 1]  # disabled
(([cos(θ), -sin(θ), 0, 0; sin(θ), cos(θ), 0, 0; 0, 0, 1, 0; 0, 0, 0, 1]*[
    cos(delta), 0, sin(delta), (A_x - dK) - Rmax1*(1 - cos(delta)) - C_max1/2*sin(delta);
    0, 1, 0, 0;
    -sin(delta), 0, cos(delta), -Rmax1*sin(delta) + C_max1/2*(1 - cos(delta));
    0, 0, 0, 1
])*[1, 0, 0, 0; 0, cos(eps), sin(eps), 0; 0, -sin(eps), cos(eps), 0; 0, 0, 0, 1])*[cos(psi), sin(psi), 0, 0; -sin(psi), cos(psi), 0, 0; 0, 0, 1, 0; 0, 0, 0, 1]*[Rr1; 0; C_i; 1] simplify → [
    A_x*cos(θ) - dK*cos(θ) - Rmax1*cos(θ) + Rmax1*cos(θ)*cos(delta) - C_max1*cos(θ)*sin(delta)/2 - C_i*sin(θ)*sin(eps) + Rr1*cos(θ)*cos(psi)*cos(delta) + C_i*cos(θ)*cos(eps)*sin(delta) + Rr1*cos(eps)*sin(θ)*sin(psi) + Rr1*cos(θ)*sin(eps)*sin(psi)*sin(delta);
    A_x*sin(θ) - dK*sin(θ) - Rmax1*sin(θ) + Rmax1*cos(delta)*sin(θ) + C_i*cos(θ)*sin(eps) - C_max1*sin(θ)*sin(delta)/2 - Rr1*cos(θ)*cos(eps)*sin(psi) + Rr1*cos(psi)*cos(delta)*sin(θ) + C_i*cos(eps)*sin(θ)*sin(delta) + Rr1*sin(θ)*sin(eps)*sin(psi)*sin(delta);
    C_max1/2 - C_max1*cos(delta)/2 - Rmax1*sin(delta) + C_i*cos(eps)*cos(delta) - Rr1*cos(psi)*sin(delta) + Rr1*cos(delta)*sin(eps)*sin(psi);
    1
]
A_x*cos(θ) - dK*cos(θ) - Rmax1*cos(θ) + Rmax1*cos(θ)*cos(delta) - C_max1*cos(θ)*sin(delta)/2 - C_i*sin(θ)*sin(eps) + Rr1*cos(θ)*cos(psi)*cos(delta) + C_i*cos(θ)*cos(eps)*sin(delta) + Rr1*cos(eps)*sin(θ)*sin(psi) + Rr1*cos(θ)*sin(eps)*sin(psi)*sin(delta) collect, cos(θ) → (A_x - dK - Rmax1 + Rmax1*cos(delta) - C_max1*sin(delta)/2 + Rr1*cos(psi)*cos(delta) + C_i*cos(eps)*sin(delta) + Rr1*sin(eps)*sin(psi)*sin(delta))*cos(θ) + Rr1*cos(eps)*sin(θ)*sin(psi) - C_i*sin(θ)*sin(eps)
XYZ1(z, X1, Y1, Z1) := [
    cos(π/2 - π/z), -sin(π/2 - π/z), 0, 0;
    sin(π/2 - π/z), cos(π/2 - π/z), 0, 0;
    0, 0, 1, 0;
    0, 0, 0, 1
]*[X1; Y1; Z1; 1]
A_x*sin(θ) - dK*sin(θ) - Rmax1*sin(θ) + Rmax1*cos(delta)*sin(θ) + C_i*cos(θ)*sin(eps) - C_max1*sin(θ)*sin(delta)/2 - Rr1*cos(θ)*cos(eps)*sin(psi) + Rr1*cos(psi)*cos(delta)*sin(θ) + C_i*cos(eps)*sin(θ)*sin(delta) + Rr1*sin(θ)*sin(eps)*sin(psi)*sin(delta) collect, sin(θ) → (A_x - dK - Rmax1 + Rmax1*cos(delta) - C_max1*sin(delta)/2 + Rr1*cos(psi)*cos(delta) + C_i*cos(eps)*sin(delta) + Rr1*sin(eps)*sin(psi)*sin(delta))*sin(θ) + C_i*cos(θ)*sin(eps) - Rr1*cos(θ)*cos(eps)*sin(psi)
(A_x - dK - Rmax1 + Rmax1*cos(delta) - C_max1*sin(delta)/2 + Rr1*cos(psi)*cos(delta) + C_i*cos(eps)*sin(delta) + Rr1*sin(eps)*sin(psi)*sin(delta))*cos(θ) + Rr1*cos(eps)*sin(θ)*sin(psi) - C_i*sin(θ)*sin(eps) collect, sin(θ) → (Rr1*cos(eps)*sin(psi) - C_i*sin(eps))*sin(θ) + cos(θ)*(A_x - dK - Rmax1 + Rmax1*cos(delta) - C_max1*sin(delta)/2 + Rr1*cos(psi)*cos(delta) + C_i*cos(eps)*sin(delta) + Rr1*sin(eps)*sin(psi)*sin(delta))
(A_x - dK - Rmax1 + Rmax1*cos(delta) - C_max1*sin(delta)/2 + Rr1*cos(psi)*cos(delta) + C_i*cos(eps)*sin(delta) + Rr1*sin(eps)*sin(psi)*sin(delta))*sin(θ) + C_i*cos(θ)*sin(eps) - Rr1*cos(θ)*cos(eps)*sin(psi) collect, cos(θ) → (C_i*sin(eps) - Rr1*cos(eps)*sin(psi))*cos(θ) + sin(θ)*(A_x - dK - Rmax1 + Rmax1*cos(delta) - C_max1*sin(delta)/2 + Rr1*cos(psi)*cos(delta) + C_i*cos(eps)*sin(delta) + Rr1*sin(eps)*sin(psi)*sin(delta))
[
    cos(π/2 - π/z), -sin(π/2 - π/z), 0, 0;
    sin(π/2 - π/z), cos(π/2 - π/z), 0, 0;
    0, 0, 1, 0;
    0, 0, 0, 1
]*[X1; Y1; Z1; 1] simplify → [X1*sin(π/z) - cos(π/z)*Y1; X1*cos(π/z) + sin(π/z)*Y1; Z1; 1]
# Исходные данные
R := 75
C_i := 0
n := 150  # n - количество дисков
eps := 8 deg
delta := -5 deg
z := 4
R_k := 35.4/2 = 17.7
A := R + R_k = 92.7
A_x := A
f(XX) := sqrt(R_k^2 - XX^2)
αz := 12 deg
f2(XX) := -sqrt(R_k^2 - XX^2)
K := π*R_k*2/z*tan(αz) = 5.90973
solve block
    # guess values
    psi := 180*deg
    # constraints
    XYZ(C_i, delta, θ, A_x, dK, eps, psi)[0] == 0
    # solver
    psix(θ, dK, C_i) := find(psi)
end solve block
solve block
    # guess values
    psi := 175*deg
    # constraints
    XYZ(C_i, delta, θ, A_x, dK, eps, psi)[1]/XYZ(C_i, delta, θ, A_x, dK, eps, psi)[0] - tan(π/z) == 0
    # solver
    psixy(θ, dK, C_i) := find(psi)
end solve block
func2 :=
    k ← 0
    for j ∈ 0 .. n
        θ ← π/z - 40*π/180
        while π/z - 40*π/180 ≤ θ ≤ π/z + 40*π/180
            dK ← K*θ*z/(2*π)
            C_i ← j*C_max/n
            if z ≤ 2
                psi ← psix(θ, dK, C_i)
                X[k] ← XYZ(C_i, delta, θ, A_x, dK, eps, psi)[0]
                Y[k] ← XYZ(C_i, delta, θ, A_x, dK, eps, psi)[1]
                Z[k] ← XYZ(C_i, delta, θ, A_x, dK, eps, psi)[2]
            if z > 2
                psi ← psixy(θ, dK, C_i)
                Xmin ← XYZ(C_i, delta, θ, A_x, dK, eps, psi)[0]
                Ymin ← XYZ(C_i, delta, θ, A_x, dK, eps, psi)[1]
                Zmin ← XYZ(C_i, delta, θ, A_x, dK, eps, psi)[2]
                X[k] ← XYZ1(z, Xmin, Ymin, Zmin)[0]
                Y[k] ← XYZ1(z, Xmin, Ymin, Zmin)[1]
                Z[k] ← XYZ1(z, Xmin, Ymin, Zmin)[2]
            k ← k + 1
            θ ← θ + 0.5*deg
    Pr2[0] ← X
    Pr2[1] ← Y
    Pr2[2] ← Z
    Pr2[3] ← k
    return Pr2
Pr2 := func2
Pr2[3] = 24311
Z1(xx) := R_k
# [plot: Z1(xx), Pr2[1] vs xx, Pr2[2]]
# [plot: Pr2[1], XX vs Pr2[0], f(XX), f2(XX)]
# [plot: Pr2[1], XX vs Pr2[0], f(XX), f2(XX)]
Δ := 0.05
func4 :=
    h ← C_max
    G ← Pr2
    i ← -1
    for j ∈ 0 .. n
        Ymin ← R_k
        Zmin ← 0
        for p ∈ 0 .. G[3] - 1
            if |G[2][p, :][0] - (C_max - h*(n - j)/n)| < Δ
                if G[1][p, :][0] < Ymin
                    Ymin ← G[1][p, :][0]
                    Zmin ← G[2][p, :][0]
        if Zmin > 0
            i ← i + 1
            YY[i] ← Ymin
            ZZ[i] ← Zmin
    HH[0] ← YY
    HH[1] ← ZZ
    HH[2] ← i
    return HH
HH := func4
# [plot: Z1(xx), Pr2[1], HH[0] vs xx, Pr2[2], HH[1]]
# [plot: Z1(xx), Pr2[1], HH[0] vs xx, Pr2[2], HH[1]]
x_1(i) := HH[1][i, :][0]
y_1(i) := HH[0][i, :][0]
A(n_1, g_1, j_1) := [
    2*sum((x_1(g_1) - x_1(i))^2, i = j_1 .. n_1), 2*sum((x_1(g_1) - x_1(i))*(y_1(g_1) - y_1(i)), i = j_1 .. n_1);
    2*sum((x_1(g_1) - x_1(i))*(y_1(g_1) - y_1(i)), i = j_1 .. n_1), 2*sum((y_1(g_1) - y_1(i))^2, i = j_1 .. n_1)
]
B(n_1, g_1, j_1) := [
    sum((x_1(i) - x_1(g_1))*(x_1(i)^2 + y_1(i)^2 - x_1(g_1)^2 - y_1(g_1)^2), i = j_1 .. n_1);
    sum((y_1(i) - y_1(g_1))*(x_1(i)^2 + y_1(i)^2 - x_1(g_1)^2 - y_1(g_1)^2), i = j_1 .. n_1)
]
C(n_1, g_1, j_1) := A(n_1, g_1, j_1)^-1*B(n_1, g_1, j_1)
S(n_1, g_1, j_1, X_c, Y_c) := sum((x_1(i)^2 + y_1(i)^2 - x_1(g_1)^2 - y_1(g_1)^2 + 2*(x_1(g_1) - x_1(i))*X_c + 2*(y_1(g_1) - y_1(i))*Y_c)^2, i = j_1 .. n_1)
Δ := 1
Funct :=
    g_2 ← 0
    j_2 ← 1
    l ← 0
    for k ∈ 2 .. HH[2]
        X1_c ← C(k, g_2, j_2)[0]
        Y1_c ← C(k, g_2, j_2)[1]
        if sqrt(S(k, g_2, j_2, X1_c, Y1_c)*1/(k - 1)) > Δ
            X[l] ← C(k - 1, g_2, j_2)[0]
            Y[l] ← C(k - 1, g_2, j_2)[1]
            R[l] ← sqrt((x_1(g_2) - X[l])^2 + (y_1(g_2) - Y[l])^2)
            g_2 ← k - 1
            h[l] ← g_2
            j_2 ← k
            k ← k
            l ← l + 1
    X[l] ← C(k - 1, g_2, j_2)[0]
    Y[l] ← C(k - 1, g_2, j_2)[1]
    R[l] ← sqrt((x_1(g_2) - X[l])^2 + (y_1(g_2) - Y[l])^2)
    t[0] ← X
    t[1] ← Y
    t[2] ← R
    t[3] ← h
    return t
HH[2] = 122
p := 2
j := 0
circle := Funct
C1 := A(p, j, j + 1)^-1*B(p, j, j + 1)
circle[0] = [-244.761; 3.72833]
circle[1] = [-101.062; 16.1368]
circle[2] = [273.073; 1.76653]
circle[3] = [33]
C1[0] = -12.2484
C1[1] = 11.0611
m := 0
pp := 1
R := sqrt((x_1(j) - C1[0])^2 + (y_1(j) - C1[1])^2) = 14.9388
cir1(x) := pp*sqrt(circle[2][m, :][0]^2 - (x - circle[0][m, :][0])^2) + circle[1][m, :][0]
cir(x) := -sqrt(R^2 - (x - C1[0])^2) + C1[1]
sqrt(S(p, j, j + 1, C1[0], C1[1])*1/(p - 1)) = 1.78798e-13
y(x) := (y_1(circle[3][0, :][0]) - y_1(0))/(x_1(circle[3][0, :][0]) - x_1(0))*x - x_1(0)*(y_1(circle[3][0, :][0]) - y_1(0))/(x_1(circle[3][0, :][0]) - x_1(0)) + y_1(0)
atan((y_1(circle[3][0, :][0]) - y_1(0))/(x_1(circle[3][0, :][0]) - x_1(0)))/deg = -64.5099
# [plot: Z1(xx), Pr2[1], HH[0], cir1(x), y(x) vs xx, Pr2[2], HH[1], x]
# [plot: Z1(xx), Pr2[1], HH[0], cir1(x), y(x) vs xx, Pr2[2], HH[1], x]
# [plot: Z1(xx), Pr2[1], HH[0], cir1(x), y(x) vs xx, Pr2[2], HH[1], x]
